<?xml version="1.0"?>
<?xml-stylesheet href="http://jsbsim.sourceforge.net/JSBSim.xsl" type="text/xsl"?>
<fdm_config name="Boeing314A" version="2.0" release="BETA"
 xmlns:xsi="http://www.w3.org/2001/XMLSchema-instance"
 xsi:noNamespaceSchemaLocation="http://jsbsim.sourceforge.net/JSBSim.xsd">

    <fileheader>
        <author> Author Name </author>
        <filecreationdate> Creation Date </filecreationdate>
        <version> Version </version>
        <description> Models a Boeing314A </description>
    </fileheader>

    <metrics>
        <wingarea unit="FT2"> 2867 </wingarea>
        <wingspan unit="FT"> 152 </wingspan>
        <chord unit="FT"> 21.57 </chord>
        <htailarea unit="FT2"> 458.72 </htailarea>
        <htailarm unit="FT"> 22.91 </htailarm>
        <vtailarea unit="FT2"> 516.06 </vtailarea>
        <vtailarm unit="FT"> 17.17 </vtailarm>
        <location name="AERORP" unit="IN">
            <x> 477.7 </x>
            <y> 0 </y>
            <z> 0 </z>
        </location>
        <location name="EYEPOINT" unit="IN">
            <x> 101.8 </x>
            <y> -24 </y>
            <z> 65 </z>
        </location>
        <location name="VRP" unit="IN">
            <x> 0 </x>
            <y> 0 </y>
            <z> 0 </z>
        </location>
    </metrics>

    <mass_balance>
        <ixx unit="SLUG*FT2"> 2.31442e+06 </ixx>
        <iyy unit="SLUG*FT2"> 1.34649e+06 </iyy>
        <izz unit="SLUG*FT2"> 3.59608e+06 </izz>
        <ixy unit="SLUG*FT2"> 0 </ixy>
        <ixz unit="SLUG*FT2"> 0 </ixz>
        <iyz unit="SLUG*FT2"> 0 </iyz>
        <emptywt unit="LBS"> 49872 </emptywt>
        <location name="CG" unit="IN">
            <x> 477.7 </x>
            <y> 0 </y>
            <z> -31.8 </z>
        </location>
    </mass_balance>

    <ground_reactions>
        <contact type="BOGEY" name="HUMP_LG">
            <location unit="IN">
                <x> 66.4 </x>
                <y> 0 </y>
                <z> -125.6 </z>
            </location>
            <static_friction> 0.8 </static_friction>
            <dynamic_friction> 0.5 </dynamic_friction>
            <rolling_friction> 0.02 </rolling_friction>
            <spring_coeff unit="LBS/FT"> 84000 </spring_coeff>
            <damping_coeff unit="LBS/FT/SEC"> 16800 </damping_coeff>
            <max_steer unit="DEG"> 0.0 </max_steer>
            <brake_group> NOSE </brake_group>
            <retractable>0</retractable>
        </contact>
        <contact type="BOGEY" name="NOSE_LG">
            <location unit="IN">
                <x> 395.4 </x>
                <y> 0 </y>
                <z> -145.6 </z>
            </location>
            <static_friction> 0.8 </static_friction>
            <dynamic_friction> 0.5 </dynamic_friction>
            <rolling_friction> 0.02 </rolling_friction>
            <spring_coeff unit="LBS/FT"> 84000 </spring_coeff>
            <damping_coeff unit="LBS/FT/SEC"> 16800 </damping_coeff>
            <max_steer unit="DEG"> 0.0 </max_steer>
            <brake_group> NOSE </brake_group>
            <retractable>0</retractable>
        </contact>
        <contact type="BOGEY" name="LEFT_MLG">
            <location unit="IN">
                <x> 495.4 </x>
                <y> -228 </y>
                <z> -135.6 </z>
            </location>
            <static_friction> 0.8 </static_friction>
            <dynamic_friction> 0.5 </dynamic_friction>
            <rolling_friction> 0.02 </rolling_friction>
            <spring_coeff unit="LBS/FT"> 84000 </spring_coeff>
            <damping_coeff unit="LBS/FT/SEC"> 16800 </damping_coeff>
            <max_steer unit="DEG"> 0.0 </max_steer>
            <brake_group> LEFT </brake_group>
            <retractable>0</retractable>
        </contact>
        <contact type="BOGEY" name="RIGHT_MLG">
            <location unit="IN">
                <x> 495.4 </x>
                <y> 228 </y>
                <z> -135.6 </z>
            </location>
            <static_friction> 0.8 </static_friction>
            <dynamic_friction> 0.5 </dynamic_friction>
            <rolling_friction> 0.02 </rolling_friction>
            <spring_coeff unit="LBS/FT"> 84000 </spring_coeff>
            <damping_coeff unit="LBS/FT/SEC"> 16800 </damping_coeff>
            <max_steer unit="DEG"> 0.0 </max_steer>
            <brake_group> RIGHT </brake_group>
            <retractable>0</retractable>
        </contact>
        <contact type="BOGEY" name="STEP_MLG">
            <location unit="IN">
                <x> 535.4 </x>
                <y> 0 </y>
                <z> -125.6 </z>
            </location>
            <static_friction> 0.8 </static_friction>
            <dynamic_friction> 0.5 </dynamic_friction>
            <rolling_friction> 0.02 </rolling_friction>
            <spring_coeff unit="LBS/FT"> 84000 </spring_coeff>
            <damping_coeff unit="LBS/FT/SEC"> 16800 </damping_coeff>
            <max_steer unit="DEG"> 0.0 </max_steer>
            <brake_group> TAIL </brake_group>
            <retractable>0</retractable>
        </contact>
        <contact type="BOGEY" name="REAR_MLG">
            <location unit="IN">
                <x> 803.4 </x>
                <y> 0 </y>
                <z> -145.6 </z>
            </location>
            <static_friction> 0.8 </static_friction>
            <dynamic_friction> 0.5 </dynamic_friction>
            <rolling_friction> 0.02 </rolling_friction>
            <spring_coeff unit="LBS/FT"> 84000 </spring_coeff>
            <damping_coeff unit="LBS/FT/SEC"> 16800 </damping_coeff>
            <max_steer unit="DEG"> 0.0 </max_steer>
            <brake_group> TAIL </brake_group>
            <retractable>0</retractable>
        </contact>
    </ground_reactions>
    <propulsion>
        <engine file="WrightGR-2600">
            <location unit="IN">
                <x> 254.4 </x>
                <y> -364.8 </y>
                <z> 40 </z>
            </location>
            <orient unit="DEG">
                <roll> 0.0 </roll>
                <pitch> 0 </pitch>
                <yaw> 0 </yaw>
            </orient>
            <feed>0</feed>
            <feed>4</feed>
            <feed>5</feed>
            <thruster file="HamiltonStd6243A-3">
                <location unit="IN">
                    <x> 254.4 </x>
                    <y> -364.8 </y>
                    <z> 40 </z>
                </location>
                <orient unit="DEG">
                    <roll> 0.0 </roll>
                    <pitch> 0.0 </pitch>
                    <yaw> 0.0 </yaw>
                </orient>
            </thruster>
        </engine>
        <engine file="WrightGR-2600">
            <location unit="IN">
                <x> 254.4 </x>
                <y> -182.4 </y>
                <z> 40 </z>
            </location>
            <orient unit="DEG">
                <roll> 0.0 </roll>
                <pitch> 0 </pitch>
                <yaw> 0 </yaw>
            </orient>
            <feed>1</feed>
            <feed>4</feed>
            <feed>5</feed>
            <thruster file="HamiltonStd6243A-3">
                <location unit="IN">
                    <x> 254.4 </x>
                    <y> -182.4 </y>
                    <z> 40 </z>
                </location>
                <orient unit="DEG">
                    <roll> 0.0 </roll>
                    <pitch> 0.0 </pitch>
                    <yaw> 0.0 </yaw>
                </orient>
            </thruster>
        </engine>
        <engine file="WrightGR-2600">
            <location unit="IN">
                <x> 254.4 </x>
                <y> 182.4 </y>
                <z> 40 </z>
            </location>
            <orient unit="DEG">
                <roll> 0.0 </roll>
                <pitch> 0 </pitch>
                <yaw> 0 </yaw>
            </orient>
            <feed>2</feed>
            <feed>4</feed>
            <feed>6</feed>
            <thruster file="HamiltonStd6243A-3">
                <location unit="IN">
                    <x> 254.4 </x>
                    <y> 182.4 </y>
                    <z> 40 </z>
                </location>
                <orient unit="DEG">
                    <roll> 0.0 </roll>
                    <pitch> 0.0 </pitch>
                    <yaw> 0.0 </yaw>
                </orient>
            </thruster>
        </engine>
        <engine file="WrightGR-2600">
            <location unit="IN">
                <x> 254.4 </x>
                <y> 364.8 </y>
                <z> 40 </z>
            </location>
            <orient unit="DEG">
                <roll> 0.0 </roll>
                <pitch> 0 </pitch>
                <yaw> 0 </yaw>
            </orient>
            <feed>3</feed>
            <feed>4</feed>
            <feed>6</feed>
            <thruster file="HamiltonStd6243A-3">
                <location unit="IN">
                    <x> 254.4 </x>
                    <y> 364.8 </y>
                    <z> 40 </z>
                </location>
                <orient unit="DEG">
                    <roll> 0.0 </roll>
                    <pitch> 0.0 </pitch>
                    <yaw> 0.0 </yaw>
                </orient>
            </thruster>
        </engine>
        <tank type="FUEL">    <!-- Tank number 0 -->
            <location unit="IN">
                <x> 0 </x>
                <y> 0 </y>
                <z> 0 </z>
            </location>
            <capacity unit="LBS"> 3600 </capacity>
            <contents unit="LBS"> 3600 </contents>
        </tank>
        <tank type="FUEL">    <!-- Tank number 1 -->
            <location unit="IN">
                <x> 502 </x>
                <y> -182.4 </y>
                <z> 30 </z>
            </location>
            <capacity unit="LBS"> 3600 </capacity>
            <contents unit="LBS"> 3600 </contents>
        </tank>
        <tank type="FUEL">    <!-- Tank number 2 -->
            <location unit="IN">
                <x> 502 </x>
                <y> 182.4 </y>
                <z> 30 </z>
            </location>
            <capacity unit="LBS"> 3600 </capacity>
            <contents unit="LBS"> 3600 </contents>
        </tank>
        <tank type="FUEL">    <!-- Tank number 3 -->
            <location unit="IN">
                <x> 502 </x>
                <y> 364.8 </y>
                <z> 30 </z>
            </location>
            <capacity unit="LBS"> 3600 </capacity>
            <contents unit="LBS"> 3600 </contents>
        </tank>
        <tank type="FUEL">    <!-- Tank number 4 -->
            <location unit="IN">
                <x> 502 </x>
                <y> 0 </y>
                <z> -40 </z>
            </location>
            <capacity unit="LBS"> 5760 </capacity>
            <contents unit="LBS"> 5760 </contents>
        </tank>
        <tank type="FUEL">    <!-- Tank number 5 -->
            <location unit="IN">
                <x> 502 </x>
                <y> -182.4 </y>
                <z> -40 </z>
            </location>
            <capacity unit="LBS"> 6984 </capacity>
            <contents unit="LBS"> 6984 </contents>
        </tank>
        <tank type="FUEL">    <!-- Tank number 6 -->
            <location unit="IN">
                <x> 502 </x>
                <y> 182.4 </y>
                <z> -40 </z>
            </location>
            <capacity unit="LBS"> 6984 </capacity>
            <contents unit="LBS"> 6984 </contents>
        </tank>
    </propulsion>
    <flight_control name="FCS: Boeing314A">
     <channel name="All">

        <summer name="Pitch Trim Sum">
            <input>fcs/elevator-cmd-norm</input>
            <input>fcs/pitch-trim-cmd-norm</input>
            <clipto>
                <min>-1</min>
                <max>1</max>
            </clipto>
        </summer>

        <aerosurface_scale name="Elevator Control">
            <input>fcs/pitch-trim-sum</input>
            <gain>0.01745</gain>
            <range>
                <min>-25</min>
                <max>25</max>
            </range>
            <output>fcs/elevator-pos-rad</output>
        </aerosurface_scale>

        <summer name="Roll Trim Sum">
            <input>fcs/aileron-cmd-norm</input>
            <input>fcs/roll-trim-cmd-norm</input>
            <clipto>
                <min>-1</min>
                <max>1</max>
            </clipto>
        </summer>

        <aerosurface_scale name="Left Aileron Control">
            <input>fcs/roll-trim-sum</input>
            <range>
                <min>-0.35</min>
                <max>0.35</max>
            </range>
            <output>fcs/left-aileron-pos-rad</output>
        </aerosurface_scale>

        <aerosurface_scale name="Right Aileron Control">
            <input>-fcs/roll-trim-sum</input>
            <range>
                <min>-0.35</min>
                <max>0.35</max>
            </range>
            <output>fcs/right-aileron-pos-rad</output>
        </aerosurface_scale>

        <summer name="Rudder Command Sum">
            <input>fcs/rudder-cmd-norm</input>
            <input>fcs/yaw-trim-cmd-norm</input>
            <clipto>
                <min>-1</min>
                <max>1</max>
            </clipto>
        </summer>

        <aerosurface_scale name="Rudder Control">
            <input>fcs/rudder-command-sum</input>
            <range>
                <min>-0.35</min>
                <max>0.35</max>
            </range>
            <output>fcs/rudder-pos-rad</output>
        </aerosurface_scale>

        <kinematic name="Flaps Control">
            <input>fcs/flap-cmd-norm</input>
            <traverse>
                <setting>
                    <position>0</position>
                    <time>0</time>
                </setting>
                <setting>
                    <position>20</position>
                    <time>4</time>
                </setting>
                <setting>
                    <position>40</position>
                    <time>3</time>
                </setting>
                <setting>
                    <position>55</position>
                    <time>2</time>
                </setting>
            </traverse>
            <output>fcs/flap-pos-deg</output>
        </kinematic>

        <kinematic name="Speedbrake Control">
            <input>fcs/speedbrake-cmd-norm</input>
            <traverse>
                <setting>
                    <position>0</position>
                    <time>0</time>
                </setting>
                <setting>
                    <position>1</position>
                    <time>1</time>
                </setting>
            </traverse>
            <output>fcs/speedbrake-pos-norm</output>
        </kinematic>
     </channel>
    </flight_control>

    <aerodynamics>
        <function name="aero/function/kHDhull">
            <description>Hull_factor</description>
            <product>
                  <table>
                      <independentVar lookup="row">velocities/vc-kts</independentVar>
                      <independentVar lookup="column">aero/h_b-mac-ft</independentVar>
                      <independentVar lookup="table">inertia/weight-lbs</independentVar>
                      <tableData breakPoint="47850">
                            0.0450	0.0550	0.0650
                          0.0000	0.0000	0.0000	0.0000
                          3.7000	0.0678	0.0339	0.0000
                          6.0000	0.1356	0.0678	0.0000
                          8.3000	0.2288	0.1144	0.0000
                          10.6000	0.3559	0.1780	0.0000
                          12.5000	0.4576	0.2288	0.0000
                          14.3000	0.5593	0.2797	0.0000
                          15.9000	0.6186	0.3093	0.0000
                          18.5000	0.7203	0.3602	0.0000
                          21.1000	0.8051	0.4026	0.0000
                          24.5000	0.8983	0.4492	0.0000
                          26.4000	0.9322	0.4661	0.0000
                          28.7000	0.9576	0.4788	0.0000
                          31.3000	0.9915	0.4958	0.0000
                          34.0000	1.0000	0.5000	0.0000
                          36.2000	0.9915	0.4958	0.0000
                          38.9000	0.9961	0.4981	0.0000
                          41.5000	0.9068	0.4534	0.0000
                          44.9000	0.7119	0.3560	0.0000
                          48.7000	0.6186	0.3093	0.0000
                          52.5000	0.4915	0.2458	0.0000
                          57.4000	0.1949	0.0975	0.0000
                      </tableData>
                      <tableData breakPoint="84000.0000">
                            0.0490	0.0590	0.0690
                          0.0000	0.0000	0.0000	0.0000
                          4.7000	0.0678	0.0339	0.0000
                          7.5000	0.1356	0.0678	0.0000
                          10.4000	0.2288	0.1144	0.0000
                          13.2000	0.3559	0.1780	0.0000
                          15.6000	0.4576	0.2288	0.0000
                          17.9000	0.5593	0.2797	0.0000
                          19.8000	0.6186	0.3093	0.0000
                          23.1000	0.7203	0.3602	0.0000
                          26.4000	0.8051	0.4026	0.0000
                          30.7000	0.8983	0.4492	0.0000
                          33.0000	0.9322	0.4661	0.0000
                          35.8000	0.9576	0.4788	0.0000
                          39.1000	0.9915	0.4958	0.0000
                          42.0000	1.0000	0.5000	0.0000
                          45.3000	0.9915	0.4958	0.0000
                          48.6000	0.9961	0.4981	0.0000
                          51.9000	0.9068	0.4534	0.0000
                          56.1000	0.7119	0.3560	0.0000
                          60.9000	0.6186	0.3093	0.0000
                          65.6000	0.4915	0.2458	0.0000
                          71.7000	0.1949	0.0975	0.0000
                      </tableData>
                  </table>
            </product>
        </function>

        <function name="aero/function/kCLge">
            <description>Change_in_lift_due_to_ground_effect</description>
            <product>
                  <table>
                      <independentVar>aero/h_b-mac-ft</independentVar>
                      <tableData>
                          0.0000	1.2000
                          0.1000	1.1500
                          0.1500	1.0900
                          0.2000	1.0200
                          1.1000	1.0000
                      </tableData>
                  </table>
            </product>
        </function>

        <function name="aero/function/kHLstep">
            <description>Step_factor</description>
            <product>
                  <table>
                      <independentVar lookup="row">aero/h_b-mac-ft</independentVar>
                      <independentVar lookup="column">velocities/vc-kts</independentVar>
                      <independentVar lookup="table">inertia/weight-lbs</independentVar>
                      <tableData breakPoint="47850.0000">
                            0.0000	17.0000	34.0000
                          0.0450	0.0000	0.0000	1.0000
                          0.0550	0.0000	0.0000	0.8000
                          0.0650	0.0000	0.0000	0.0000
                      </tableData>
                      <tableData breakPoint="84000.0000">
                            0.0000	21.0000	42.0000
                          0.0490	0.0000	0.0000	1.0000
                          0.0590	0.0000	0.0000	0.8000
                          0.0690	0.0000	0.0000	0.0000
                      </tableData>
                  </table>
            </product>
        </function>

        <function name="aero/function/kHmstep">
            <description>Step_factor</description>
            <product>
                  <table>
                      <independentVar lookup="row">velocities/vc-kts</independentVar>
                      <independentVar lookup="column">aero/h_b-mac-ft</independentVar>
                      <independentVar lookup="table">inertia/weight-lbs</independentVar>
                      <tableData breakPoint="47850.0000">
                            0.0450	0.0550	0.0650
                          0.0000	0.0000	0.0000	0.0000
                          17.0000	-1.6000	-1.2800	0.0000
                          34.0000	0.8000	0.6400	0.0000
                          51.0000	0.0000	0.0000	0.0000
                          57.0000	-0.1000	-0.0800	0.0000
                      </tableData>
                      <tableData breakPoint="84000.0000">
                            0.0490	0.0590	0.0690
                          0.0000	0.0000	0.0000	0.0000
                          21.0000	-1.6000	-1.2800	0.0000
                          42.0000	0.8000	0.6400	0.0000
                          63.0000	0.0000	0.0000	0.0000
                          72.0000	-0.1000	-0.0800	0.0000
                      </tableData>
                  </table>
            </product>
        </function>

        <function name="aero/function/kAmgear">
            <description>Compression_factor</description>
            <product>
                  <table>
                      <independentVar lookup="row">velocities/vc-kts</independentVar>
                      <independentVar lookup="column">aero/h_b-mac-ft</independentVar>
                      <independentVar lookup="table">inertia/weight-lbs</independentVar>
                      <tableData breakPoint="47850.0000">
                            0.0450	0.0550	0.0650
                          0.0000	0.0000	0.0000	0.0000
                          17.0000	2.0000	1.6000	0.0000
                          34.0000	1.0000	0.8000	0.0000
                          51.0000	0.7000	0.5600	0.0000
                          57.0000	0.7000	0.5600	0.0000
                      </tableData>
                      <tableData breakPoint="84000.0000">
                            0.0490	0.0590	0.0690
                          0.0000	0.0000	0.0000	0.0000
                          21.0000	2.0000	1.6000	0.0000
                          42.0000	3.0000	2.4000	0.0000
                          63.0000	0.7000	0.5600	0.0000
                          72.0000	0.7000	0.5600	0.0000
                      </tableData>
                  </table>
            </product>
        </function>

        <function name="aero/function/kHmkhi">
            <description>Rebound_due_to_khi</description>
            <product>
                  <table>
                      <independentVar lookup="row">flight-path/gamma-rad</independentVar>
                      <independentVar lookup="column">attitude/pitch-rad</independentVar>
                      <independentVar lookup="table">velocities/vc-kts</independentVar>
                      <tableData breakPoint="42.0000">
                            0.0500	0.2600
                          0.0000	0.0000	0.0000
                          0.3500	0.0000	0.0000
                          0.7000	0.0000	0.0000
                          1.0500	0.0000	0.0000
                          1.4000	0.0000	0.0000
                      </tableData>
                      <tableData breakPoint="52.0000">
                            0.0500	0.2600
                          0.0000	15.0000	13.0000
                          0.3500	0.3500	1.1000
                          0.7000	0.2500	0.6000
                          1.0500	0.1500	0.5000
                          1.4000	0.0500	0.4000
                      </tableData>
                  </table>
            </product>
        </function>

        <axis name="DRAG">
            <function name="aero/coefficient/HDhull0">
                <description>Drag_at_hump</description>
                <product>
                    <property>aero/qbar-psf</property>
                    <property>metrics/Sw-sqft</property>
                    <property>aero/function/kHDhull</property>
                    <value>0.1200</value>
                </product>
            </function>
            <function name="aero/coefficient/CDo">
                <description>Drag_at_zero_lift</description>
                <product>
                    <property>aero/qbar-psf</property>
                    <property>metrics/Sw-sqft</property>
                    <value>0.0274</value>
                </product>
            </function>
            <function name="aero/coefficient/CDalpha">
                <description>Drag_due_to_alpha</description>
                <product>
                    <property>aero/qbar-psf</property>
                    <property>metrics/Sw-sqft</property>
                      <table>
                          <independentVar>aero/alpha-rad</independentVar>
                          <tableData>
                              -1.5700	1.4726
                              -0.2600	0.0286
                              0.0000	0.0006
                              0.2600	0.0286
                              1.5700	1.4726
                          </tableData>
                      </table>
                </product>
            </function>
            <function name="aero/coefficient/CDi">
                <description>Induced_drag</description>
                <product>
                    <property>aero/qbar-psf</property>
                    <property>metrics/Sw-sqft</property>
                    <property>aero/cl-squared-norm</property>
                    <value>0.0390</value>
                </product>
            </function>
            <function name="aero/coefficient/CDmach">
                <description>Drag_due_to_mach</description>
                <product>
                    <property>aero/qbar-psf</property>
                    <property>metrics/Sw-sqft</property>
                      <table>
                          <independentVar>velocities/mach-norm</independentVar>
                          <tableData>
                              0.0000	0.0000
                              0.7000	0.0000
                              1.1000	0.0230
                              1.8000	0.0150
                          </tableData>
                      </table>
                </product>
            </function>
            <function name="aero/coefficient/CDflap">
                <description>Drag_due_to_flaps</description>
                <product>
                    <property>aero/qbar-psf</property>
                    <property>metrics/Sw-sqft</property>
                    <property>fcs/components/flaps-control/output-norm</property>
                    <value>0.0350</value>
                </product>
            </function>
            <function name="aero/coefficient/CDsb">
                <description>Drag_due_to_speedbrakes</description>
                <product>
                    <property>aero/qbar-psf</property>
                    <property>metrics/Sw-sqft</property>
                    <property>fcs/speedbrake-pos-norm</property>
                    <value>0.0280</value>
                </product>
            </function>
            <function name="aero/coefficient/CDbeta">
                <description>Drag_due_to_sideslip</description>
                <product>
                    <property>aero/qbar-psf</property>
                    <property>metrics/Sw-sqft</property>
                      <table>
                          <independentVar>aero/beta-rad</independentVar>
                          <tableData>
                              -1.5700	1.2300
                              -0.2600	0.0500
                              0.0000	0.0000
                              0.2600	0.0500
                              1.5700	1.2300
                          </tableData>
                      </table>
                </product>
            </function>
            <function name="aero/coefficient/CDde">
                <description>Drag_due_to_Elevator_Deflection</description>
                <product>
                    <property>aero/qbar-psf</property>
                    <property>metrics/Sw-sqft</property>
                    <property>fcs/elevator-pos-norm</property>
                    <value>0.0350</value>
                </product>
            </function>
        </axis>

        <axis name="SIDE">
            <function name="aero/coefficient/CYb">
                <description>Side_force_due_to_beta</description>
                <product>
                    <property>aero/qbar-psf</property>
                    <property>metrics/Sw-sqft</property>
                    <property>aero/beta-rad</property>
                    <value>-1.0000</value>
                </product>
            </function>
        </axis>

        <axis name="LIFT">
            <function name="aero/coefficient/HLstep0">
                <description>Lift_at_step</description>
                <product>
                    <property>aero/qbar-psf</property>
                    <property>metrics/Sw-sqft</property>
                    <property>aero/function/kHLstep</property>
                      <table>
                          <independentVar lookup="row">attitude/roll-rad</independentVar>
                          <independentVar lookup="column">velocities/vc-kts</independentVar>
                          <independentVar lookup="table">inertia/weight-lbs</independentVar>
                          <tableData breakPoint="47850.0000">
                              	34.0000	44.0000
                              -0.0690	0.0000	0.0000
                              -0.0590	0.0000	0.5000
                              -0.0490	0.5000	1.0000
                              -0.0290	1.0000	1.0000
                              0.0290	1.0000	1.0000
                              0.0490	0.5000	1.0000
                              0.0590	0.0000	0.5000
                              0.0690	0.0000	0.0000
                          </tableData>
                          <tableData breakPoint="84000.0000">
                              	42.0000	52.0000
                              -0.0600	0.0000	0.0000
                              -0.0500	0.0000	0.5000
                              -0.0400	0.5000	1.0000
                              -0.0200	1.0000	1.0000
                              0.0200	1.0000	1.0000
                              0.0400	0.5000	1.0000
                              0.0500	0.0000	0.5000
                              0.0600	0.0000	0.0000
                          </tableData>
                      </table>
                </product>
            </function>
            <function name="aero/coefficient/CLo">
                <description>Lift_at_zero_alpha</description>
                <product>
                    <property>aero/qbar-psf</property>
                    <property>metrics/Sw-sqft</property>
                    <property>aero/function/kCLge</property>
                    <value>0.2400</value>
                </product>
            </function>
            <function name="aero/coefficient/CLalpha">
                <description>Lift_due_to_alpha</description>
                <product>
                    <property>aero/qbar-psf</property>
                    <property>metrics/Sw-sqft</property>
                    <property>aero/function/kCLge</property>
                      <table>
                          <independentVar>aero/alpha-rad</independentVar>
                          <tableData>
                              -0.2000	-0.9800
                              0.0000	0.0000
                              0.2400	1.1600
                              0.6000	0.4640
                          </tableData>
                      </table>
                </product>
            </function>
            <function name="aero/coefficient/dCLflap">
                <description>Delta_Lift_due_to_flaps</description>
                <product>
                    <property>aero/qbar-psf</property>
                    <property>metrics/Sw-sqft</property>
                    <property>fcs/components/flaps-control/output-norm</property>
                    <property>aero/function/kCLge</property>
                    <value>0.6000</value>
                </product>
            </function>
            <function name="aero/coefficient/dCLsb">
                <description>Delta_Lift_due_to_speedbrake</description>
                <product>
                    <property>aero/qbar-psf</property>
                    <property>metrics/Sw-sqft</property>
                    <property>fcs/speedbrake-pos-norm</property>
                    <value>0.0000</value>
                </product>
            </function>
            <function name="aero/coefficient/CLde">
                <description>Lift_due_to_Elevator_Deflection</description>
                <product>
                    <property>aero/qbar-psf</property>
                    <property>metrics/Sw-sqft</property>
                    <property>fcs/elevator-pos-rad</property>
                    <value>0.2000</value>
                </product>
            </function>
        </axis>

        <axis name="ROLL">
            <function name="aero/coefficient/Clb">
                <description>Roll_moment_due_to_beta</description>
                <product>
                    <property>aero/qbar-psf</property>
                    <property>metrics/Sw-sqft</property>
                    <property>metrics/bw-ft</property>
                    <property>aero/beta-rad</property>
                    <value>-0.1000</value>
                </product>
            </function>
            <function name="aero/coefficient/Clp">
                <description>Roll_moment_due_to_roll_rate</description>
                <product>
                    <property>aero/qbar-psf</property>
                    <property>metrics/Sw-sqft</property>
                    <property>metrics/bw-ft</property>
                    <property>aero/bi2vel</property>
                    <property>velocities/p-aero-rad_sec</property>
                    <value>-0.4000</value>
                </product>
            </function>
            <function name="aero/coefficient/Clr">
                <description>Roll_moment_due_to_yaw_rate</description>
                <product>
                    <property>aero/qbar-psf</property>
                    <property>metrics/Sw-sqft</property>
                    <property>metrics/bw-ft</property>
                    <property>aero/bi2vel</property>
                    <property>velocities/r-aero-rad_sec</property>
                    <value>0.1500</value>
                </product>
            </function>
            <function name="aero/coefficient/Clda">
                <description>Roll_moment_due_to_aileron</description>
                <product>
                    <property>aero/qbar-psf</property>
                    <property>metrics/Sw-sqft</property>
                    <property>metrics/bw-ft</property>
                    <property>fcs/left-aileron-pos-rad</property>
                      <table>
                          <independentVar>velocities/mach-norm</independentVar>
                          <tableData>
                              0.0000	0.1500
                              2.0000	0.0500
                          </tableData>
                      </table>
                </product>
            </function>
            <function name="aero/coefficient/Cldr">
                <description>Roll_moment_due_to_rudder</description>
                <product>
                    <property>aero/qbar-psf</property>
                    <property>metrics/Sw-sqft</property>
                    <property>metrics/bw-ft</property>
                    <property>fcs/rudder-pos-rad</property>
                    <value>0.0100</value>
                </product>
            </function>
        </axis>

        <axis name="PITCH">
            <function name="aero/coefficient/Hmstep0">
                <description>Trim_moment_at_step</description>
                <product>
                    <property>aero/qbar-psf</property>
                    <property>metrics/Sw-sqft</property>
                    <property>metrics/cbarw-ft</property>
                    <property>aero/function/kHmstep</property>
                    <value>1.0000</value>
                </product>
            </function>
            <function name="aero/coefficient/Amgear0">
                <description>Compression</description>
                <product>
                    <property>aero/qbar-psf</property>
                    <property>metrics/Sw-sqft</property>
                    <property>metrics/cbarw-ft</property>
                    <property>aero/function/kAmgear</property>
                    <value>0.5000</value>
                </product>
            </function>
            <function name="aero/coefficient/Hmrebound0">
                <description>Rebound_due_to_vertical_speed</description>
                <product>
                    <property>aero/qbar-psf</property>
                    <property>metrics/Sw-sqft</property>
                    <property>metrics/cbarw-ft</property>
                    <property>aero/function/kHmkhi</property>
                      <table>
                          <independentVar lookup="row">velocities/v-down-fps</independentVar>
                          <independentVar lookup="column">aero/h_b-mac-ft</independentVar>
                          <independentVar lookup="table">inertia/weight-lbs</independentVar>
                          <tableData breakPoint="47850.0000">
                              	0.0650	0.0700	0.0750
                              0.0000	0.0000	0.0000	0.0000
                              11.6700	0.0000	0.3000	0.0000
                          </tableData>
                          <tableData breakPoint="84000.0000">
                              	0.0690	0.0740	0.0790
                              0.0000	0.0000	0.0000	0.0000
                              11.6700	0.0000	0.3000	0.0000
                          </tableData>
                      </table>
                </product>
            </function>
            <function name="aero/coefficient/Cmalpha">
                <description>Pitch_moment_due_to_alpha</description>
                <product>
                    <property>aero/qbar-psf</property>
                    <property>metrics/Sw-sqft</property>
                    <property>metrics/cbarw-ft</property>
                    <property>aero/alpha-rad</property>
                    <value>-0.4000</value>
                </product>
            </function>
            <function name="aero/coefficient/Cmde">
                <description>Pitch_moment_due_to_elevator</description>
                <product>
                    <property>aero/qbar-psf</property>
                    <property>metrics/Sw-sqft</property>
                    <property>metrics/cbarw-ft</property>
                    <property>fcs/elevator-pos-rad</property>
                      <table>
                          <independentVar>velocities/mach-norm</independentVar>
                          <tableData>
                              0.0000	-1.0000
                              2.0000	-0.2500
                          </tableData>
                      </table>
                </product>
            </function>
            <function name="aero/coefficient/Cmq">
                <description>Pitch_moment_due_to_pitch_rate</description>
                <product>
                    <property>aero/qbar-psf</property>
                    <property>metrics/Sw-sqft</property>
                    <property>metrics/cbarw-ft</property>
                    <property>aero/ci2vel</property>
                    <property>velocities/q-aero-rad_sec</property>
                    <value>-22.0000</value>
                </product>
            </function>
            <function name="aero/coefficient/Cmadot">
                <description>Pitch_moment_due_to_alpha_rate</description>
                <product>
                    <property>aero/qbar-psf</property>
                    <property>metrics/Sw-sqft</property>
                    <property>metrics/cbarw-ft</property>
                    <property>aero/ci2vel</property>
                    <property>aero/alphadot-rad_sec</property>
                    <value>-8.0000</value>
                </product>
            </function>
        </axis>

        <axis name="YAW">
            <function name="aero/coefficient/Cnb">
                <description>Yaw_moment_due_to_beta</description>
                <product>
                    <property>aero/qbar-psf</property>
                    <property>metrics/Sw-sqft</property>
                    <property>metrics/bw-ft</property>
                    <property>aero/beta-rad</property>
                    <value>0.1200</value>
                </product>
            </function>
            <function name="aero/coefficient/Cnr">
                <description>Yaw_moment_due_to_yaw_rate</description>
                <product>
                    <property>aero/qbar-psf</property>
                    <property>metrics/Sw-sqft</property>
                    <property>metrics/bw-ft</property>
                    <property>aero/bi2vel</property>
                    <property>velocities/r-aero-rad_sec</property>
                    <value>-0.1500</value>
                </product>
            </function>
            <function name="aero/coefficient/Cndr">
                <description>Yaw_moment_due_to_rudder</description>
                <product>
                    <property>aero/qbar-psf</property>
                    <property>metrics/Sw-sqft</property>
                    <property>metrics/bw-ft</property>
                    <property>fcs/rudder-pos-rad</property>
                    <value>-0.1000</value>
                </product>
            </function>
            <function name="aero/coefficient/Cnda">
                <description>Adverse_yaw</description>
                <product>
                    <property>aero/qbar-psf</property>
                    <property>metrics/Sw-sqft</property>
                    <property>metrics/bw-ft</property>
                    <property>fcs/left-aileron-pos-rad</property>
                    <value>-0.0080</value>
                </product>
            </function>
        </axis>
    </aerodynamics>
</fdm_config>
