<FDM_CONFIG NAME="Navion" VERSION="1.65" RELEASE="ALPHA">
<!--
  File:     Navion.xml
  Type:     North American L-17 Navion
  Author:   Aero-Matic v 0.71
            L. Teper, "Aircraft Stability and Control Data, NASA CR-96008, 1969.
                Aircraft covered are A-7A, A-4D, F-106B, T-38, F-5A, F-104,
                F-105B, B-58, Navion, and DC-8.
            http://ewarbirds.org/navion.html
            http://www.aerologic.com/stab/corr.html

  Inputs:
    name:          Navion
    type:          light single
    max weight:    10000.0 lb
    wing span:     33.42 ft
    length:        27.5 ft
    wing area:     184 sq-ft
    gear type:     tricycle
    retractable?:  yes
    # engines:     1
    engine type:   piston
    engine layout: forward fuselage
    yaw damper?    no

  Outputs:
    wing loading:  54.35 lb/sq-ft
    CL-alpha:      5 per radian
    CL-0:          0.25
    CL-max:        1.4
    CD-0:          0.024
    K:             0.04

-->

 <METRICS>
   AC_WINGAREA  184.00
   AC_WINGSPAN  33.42
   AC_CHORD      5.7
   AC_HTAILAREA 29.44
   AC_HTAILARM  14.30
   AC_VTAILAREA 18.40
   AC_LV        13.75
   AC_IXX       1048
   AC_IYY       3000
   AC_IZZ       3530
   AC_IXZ       0
   AC_EMPTYWT   2750
   AC_CGLOC     158.4  0.0 -8.3
   AC_AERORP    158.4  0.0  0.0
   AC_EYEPTLOC  42.9 -18.0 45.0
   AC_VRP       0 0 0
 </METRICS>
 <UNDERCARRIAGE>
  AC_GEAR NOSE_LG   42.9  0.0 -39.6 3000.0 1000.0  0.5  0.8  0.02 STEERABLE NONE  5.0 RETRACT
  AC_GEAR LEFT_MLG  164.7 -36.1 -39.6 10000.0 2000.0  0.5  0.8  0.02 FIXED LEFT  0 RETRACT
  AC_GEAR RIGHT_MLG 164.7 36.1 -39.6 10000.0 2000.0  0.5  0.8  0.02 FIXED RIGHT 0 RETRACT
 </UNDERCARRIAGE>
 <PROPULSION>
  <AC_ENGINE FILE="engIO470D">
    XLOC 36
    YLOC 0
    ZLOC 0
    PITCH 0
    YAW 0
    FEED 0
    <AC_THRUSTER FILE="prop_75in2f">
      XLOC 36
      YLOC 0
      ZLOC 0
      PITCH 0
      YAW 0
    </AC_THRUSTER>
  </AC_ENGINE>
  <AC_TANK TYPE="FUEL" NUMBER="0">
    XLOC 158.4
    YLOC 0
    ZLOC -8.25
    RADIUS 1
    CAPACITY    20.0
    CONTENTS    10.0
  </AC_TANK>
  <AC_TANK TYPE="FUEL" NUMBER="1">
    XLOC 158.4
    YLOC 0
    ZLOC -8.25
    RADIUS 1
    CAPACITY    20.0
    CONTENTS    10.0
  </AC_TANK>
 </PROPULSION>
 <FLIGHT_CONTROL NAME="Navion">
   <COMPONENT NAME="Pitch Trim Sum" TYPE="SUMMER">
      INPUT   fcs/elevator-cmd-norm
      INPUT   fcs/pitch-trim-cmd-norm
      CLIPTO  -1 1
   </COMPONENT>
   <COMPONENT NAME="Elevator Control" TYPE="AEROSURFACE_SCALE">
      INPUT   fcs/pitch-trim-sum
      MIN     -0.350
      MAX      0.300
      OUTPUT  fcs/elevator-pos-rad
   </COMPONENT>
   <COMPONENT NAME="Roll Trim Sum" TYPE="SUMMER">
      INPUT   fcs/aileron-cmd-norm
      INPUT   fcs/roll-trim-cmd-norm
      CLIPTO  -1 1
   </COMPONENT>
   <COMPONENT NAME="Left Aileron Control" TYPE="AEROSURFACE_SCALE">
      INPUT   fcs/roll-trim-sum
      MIN    -0.35
      MAX     0.35
      OUTPUT  fcs/left-aileron-pos-rad
   </COMPONENT>
   <COMPONENT NAME="Right Aileron Control" TYPE="AEROSURFACE_SCALE">
      INPUT  -fcs/roll-trim-sum
      MIN    -0.35
      MAX     0.35
      OUTPUT  fcs/right-aileron-pos-rad
   </COMPONENT>
   <COMPONENT NAME="Rudder Command Sum" TYPE="SUMMER">
      INPUT   fcs/rudder-cmd-norm
      INPUT   fcs/yaw-trim-cmd-norm
      CLIPTO  -1 1
   </COMPONENT>
   <COMPONENT NAME="Rudder Control" TYPE="AEROSURFACE_SCALE">
      INPUT   fcs/rudder-command-sum
      MIN     -0.35
      MAX      0.35
      OUTPUT  fcs/rudder-pos-rad
   </COMPONENT>
   <COMPONENT NAME="Flaps Control" TYPE="KINEMAT">
     INPUT   fcs/flap-cmd-norm
     DETENTS 3
             0   0
             15  4
             30  3
     OUTPUT  fcs/flap-pos-deg
   </COMPONENT>
   <COMPONENT NAME="Gear Control" TYPE="KINEMAT">
     INPUT   gear/gear-cmd-norm
     DETENTS 2
             0   0
             1   5
     OUTPUT  gear/gear-pos-norm
   </COMPONENT>
   <COMPONENT NAME="Speedbrake Control" TYPE="KINEMAT">
     INPUT   fcs/speedbrake-cmd-norm
     DETENTS 2
             0   0
             1   1
     OUTPUT  fcs/speedbrake-pos-norm
   </COMPONENT>
 </FLIGHT_CONTROL>
 <AERODYNAMICS>
  <AXIS NAME="LIFT">
    <COEFFICIENT NAME="CLalpha" TYPE="VECTOR">
      Lift_due_to_alpha
      4
      aero/alpha-rad
      aero/qbar-psf|metrics/Sw-sqft
      -0.20   -0.750
       0.00    0.250
       0.23    1.0212
       0.60    0.710
    </COEFFICIENT>
    <COEFFICIENT NAME="dCLflap" TYPE="VALUE">
       Delta_Lift_due_to_flaps
       aero/qbar-psf|metrics/Sw-sqft|fcs/components/flaps-control/output-norm
       0.4
    </COEFFICIENT>
    <COEFFICIENT NAME="dCLsb" TYPE="VALUE">
       Delta_Lift_due_to_speedbrake
       aero/qbar-psf|metrics/Sw-sqft|fcs/speedbrake-pos-norm
       0
    </COEFFICIENT>
    <COEFFICIENT NAME="CLde" TYPE="VALUE">
       Lift_due_to_Elevator_Deflection
       aero/qbar-psf|metrics/Sw-sqft|fcs/elevator-pos-rad
       0.355
    </COEFFICIENT>
  </AXIS>
  <AXIS NAME="DRAG">
    <COEFFICIENT NAME="CD0" TYPE="VECTOR">
       Drag_at_zero_lift
       5
       aero/alpha-rad
       aero/qbar-psf|metrics/Sw-sqft
       -1.57       1.500
       -0.26       0.048
        0.00       0.024
        0.26       0.048
        1.57       1.500
    </COEFFICIENT>
    <COEFFICIENT NAME="CDi" TYPE="VALUE">
       Induced_drag
       aero/qbar-psf|metrics/Sw-sqft|aero/cl-squared-norm
       0.04
    </COEFFICIENT>
    <COEFFICIENT NAME="CDmach" TYPE="VECTOR">
       Drag_due_to_mach
       4
       velocities/mach-norm
       aero/qbar-psf|metrics/Sw-sqft
       0.0       0.000
       0.7      0.000
       1.1       0.023
       1.8       0.015
    </COEFFICIENT>
    <COEFFICIENT NAME="CDflap" TYPE="VALUE">
       Drag_due_to_flaps
       aero/qbar-psf|metrics/Sw-sqft|fcs/components/flaps-control/output-norm
       0.03
    </COEFFICIENT>
    <COEFFICIENT NAME="CDgear" TYPE="VALUE">
       Drag_due_to_gear
       aero/qbar-psf|metrics/Sw-sqft|gear/gear-pos-norm
       0.03
    </COEFFICIENT>
    <COEFFICIENT NAME="CDsb" TYPE="VALUE">
       Drag_due_to_speedbrakes
       aero/qbar-psf|metrics/Sw-sqft|fcs/speedbrake-pos-norm
       0.024
    </COEFFICIENT>
    <COEFFICIENT NAME="CDbeta" TYPE="VECTOR">
       Drag_due_to_sideslip
       5
       aero/beta-rad
       aero/qbar-psf|metrics/Sw-sqft
       -1.57       1.230
       -0.26       0.050
        0.00       0.00
        0.26       0.050
        1.57       1.230
    </COEFFICIENT>
    <COEFFICIENT NAME="CDde" TYPE="VALUE">
       Drag_due_to_Elevator_Deflection
       aero/qbar-psf|metrics/Sw-sqft|fcs/elevator-pos-norm
       0.03
    </COEFFICIENT>
  </AXIS>
  <AXIS NAME="SIDE">
    <COEFFICIENT NAME="CYb" TYPE="VALUE">
       Side_force_due_to_beta
       aero/qbar-psf|metrics/Sw-sqft|aero/beta-rad
       -0.564
    </COEFFICIENT>
  </AXIS>
  <AXIS NAME="ROLL">
    <COEFFICIENT NAME="Clb" TYPE="VALUE">
       Roll_moment_due_to_beta
       aero/qbar-psf|metrics/Sw-sqft|metrics/bw-ft|aero/beta-rad
       -0.074
    </COEFFICIENT>
    <COEFFICIENT NAME="Clp" TYPE="VALUE">
       Roll_moment_due_to_roll_rate
       aero/qbar-psf|metrics/Sw-sqft|metrics/bw-ft|aero/bi2vel|velocities/p-aero-rad_sec
       -0.41
    </COEFFICIENT>
    <COEFFICIENT NAME="Clr" TYPE="VALUE">
       Roll_moment_due_to_yaw_rate
       aero/qbar-psf|metrics/Sw-sqft|metrics/bw-ft|aero/bi2vel|velocities/r-aero-rad_sec
       0.107
    </COEFFICIENT>
    <COEFFICIENT NAME="Clda" TYPE="VECTOR">
       Roll_moment_due_to_aileron
       2
       velocities/mach-norm
       aero/qbar-psf|metrics/Sw-sqft|metrics/bw-ft|fcs/left-aileron-pos-rad
       0.0       0.134
       2.0       0.057
    </COEFFICIENT>
    <COEFFICIENT NAME="Cldr" TYPE="VALUE">
       Roll_moment_due_to_rudder
       aero/qbar-psf|metrics/Sw-sqft|metrics/bw-ft|fcs/rudder-pos-rad
       0.0107
    </COEFFICIENT>
  </AXIS>
  <AXIS NAME="PITCH">
    <COEFFICIENT NAME="Cmalpha" TYPE="VALUE">
       Pitch_moment_due_to_alpha
       aero/qbar-psf|metrics/Sw-sqft|metrics/cbarw-ft|aero/alpha-rad
       -0.683
    </COEFFICIENT>
    <COEFFICIENT NAME="Cmde" TYPE="VECTOR">
       Pitch_moment_due_to_elevator
       2
       velocities/mach-norm
       aero/qbar-psf|metrics/Sw-sqft|metrics/cbarw-ft|fcs/elevator-pos-rad
       0.0       -0.923
       2.0       -0.275
    </COEFFICIENT>
    <COEFFICIENT NAME="Cmq" TYPE="VALUE">
       Pitch_moment_due_to_pitch_rate
       aero/qbar-psf|metrics/Sw-sqft|metrics/cbarw-ft|aero/ci2vel|velocities/q-aero-rad_sec
       -9.96
    </COEFFICIENT>
    <COEFFICIENT NAME="Cmadot" TYPE="VALUE">
       Pitch_moment_due_to_alpha_rate
       aero/qbar-psf|metrics/Sw-sqft|metrics/cbarw-ft|aero/ci2vel|aero/alphadot-rad_sec
       -4.36
    </COEFFICIENT>
  </AXIS>
  <AXIS NAME="YAW">
    <COEFFICIENT NAME="Cnb" TYPE="VALUE">
       Yaw_moment_due_to_beta
       aero/qbar-psf|metrics/Sw-sqft|metrics/bw-ft|aero/beta-rad
       0.071
    </COEFFICIENT>
    <COEFFICIENT NAME="Cnp" TYPE="VALUE">
        Yaw_moment_due_to_roll_rate
        aero/qbar-psf|metrics/Sw-sqft|metrics/bw-ft|aero/bi2vel|velocities/p-aero-rad_sec
        -0.0575
     </COEFFICIENT>
    <COEFFICIENT NAME="Cnr" TYPE="VALUE">
       Yaw_moment_due_to_yaw_rate
       aero/qbar-psf|metrics/Sw-sqft|metrics/bw-ft|aero/bi2vel|velocities/r-aero-rad_sec
       -0.125
    </COEFFICIENT>
    <COEFFICIENT NAME="Cndr" TYPE="VALUE">
       Yaw_moment_due_to_rudder
       aero/qbar-psf|metrics/Sw-sqft|metrics/bw-ft|fcs/rudder-pos-rad
       -0.072
    </COEFFICIENT>
    <COEFFICIENT NAME="Cnda" TYPE="VALUE">
       Adverse_yaw
       aero/qbar-psf|metrics/Sw-sqft|metrics/bw-ft|fcs/left-aileron-pos-rad
       -0.0035
    </COEFFICIENT>
  </AXIS>
 </AERODYNAMICS>
</FDM_CONFIG>
