<FDM_CONFIG NAME="T38" VERSION="1.60">
<!--                                                                                             -
  File:        t38.xml
  Author:      David Culp
  CVS Version: $Id: T38.xml,v 1.1 2003/06/07 08:37:10 ehofman Exp $

  Function: Models a Northrop T-38A
-->
  <METRICS>
    AC_WINGAREA   170.0  <!-- ft2 -->
    AC_WINGSPAN    25.26 <!-- ft  -->
    AC_CHORD        6.0  <!-- MAC, in ft  -->
    AC_HTAILAREA   34.0  <!-- ft2 -->
    AC_HTAILARM    13.0  <!-- ft  -->
    AC_VTAILAREA   47.0  <!-- ft2 -->
    AC_LV          13.0  <!-- ft  -->
    AC_IXX       5000.0  <!-- slug-ft2 -->
    AC_IYY      40000.0  <!-- slug-ft2 -->
    AC_IZZ      38000.0  <!-- slug-ft2 -->
    AC_IXZ       4000.0  <!-- slug-ft2 -->
    AC_EMPTYWT   7574.0	 <!-- with crew  -->
    <!-- origin at nose, not including probe, x,y,z in inches -->
    AC_CGLOC      320.0   0.0 -10.0
    AC_AERORP     320.0   0.0   0.0
    AC_EYEPTLOC   154.0   0.0  36.0
  </METRICS>
  <UNDERCARRIAGE>
    <!--
    The gear parameters that can be specified are as follows, IN ORDER OF APPEARANCE:

    AC_GEAR
    <name>                           name of gear entry - no spaces allowed
    <X> <Y> <Z>                      Gear location in aircraft body coords in inches
    <spring constant>                spring constant in lbs/ft
    <damping coefficient>            damping coefficient in lbs/ft/sec
    <dynamic friction coefficient>   Self-explanatory: sliding friction coefficient
    <static friction coefficient>    Self-explanatory: "onset" friction coefficient
    <rolling friction coefficient>   Self-explanatory: rolling friction coefficient
    <steerability attribute>         One of <STEERABLE | FIXED | CASTERED>
    <brake group membership>         One of <LEFT | CENTER | RIGHT | NOSE | TAIL | NONE>
    <max steer angle>                Maximum steerable angle in degrees
    <retraction attribute>           <RETRACT | FIXED>
    -->
    AC_GEAR NOSE_LG    140.0    0.0  -60.0   2000  1000 0.5 0.50 0.02 STEERABLE NONE   80  RETRACT
    AC_GEAR LEFT_MLG   335.0  -65.0  -60.0   5000  8000 0.5 0.50 0.02 FIXED     LEFT   0   RETRACT
    AC_GEAR RIGHT_MLG  335.0   65.0  -60.0   5000  8000 0.5 0.50 0.02 FIXED     RIGHT  0   RETRACT
  </UNDERCARRIAGE>

  <PROPULSION>
    <AC_ENGINE FILE="J85-GE-5_sim">
      XLOC      452.0
      YLOC      -16.0
      ZLOC        0.0
      PITCH       0.0
      YAW         0.0
      FEED          1
    </AC_ENGINE>
    <AC_THRUSTER FILE="direct">
      XLOC      551.0
      YLOC      -16.0
      ZLOC        0.0
      PITCH       0.0
      YAW         0.0
    </AC_THRUSTER>
    <AC_ENGINE FILE="J85-GE-5_sim">
      XLOC      452.0
      YLOC       16.0
      ZLOC        0.0
      PITCH       0.0
      YAW         0.0
      FEED          2
    </AC_ENGINE>
    <AC_THRUSTER FILE="direct">
      XLOC      551.0
      YLOC       16.0
      ZLOC        0.0
      PITCH       0.0
      YAW         0.0
    </AC_THRUSTER>
    <AC_TANK TYPE="FUEL" NUMBER="0">  <!-- left/fwd -->
      XLOC       298.0
      YLOC         0.0
      ZLOC         0.0
      RADIUS       1.0
      CAPACITY  1953.0
      CONTENTS  1900.0
    </AC_TANK>
    <AC_TANK TYPE="FUEL" NUMBER="1">  <!-- right/aft -->
      XLOC       370.0
      YLOC         0.0
      ZLOC         0.0
      RADIUS       1.0
      CAPACITY  2029.0
      CONTENTS  2000.0
    </AC_TANK>
  </PROPULSION>

  <FLIGHT_CONTROL NAME="t38-fcs">
     <!-- The T-38 flap-slab interconnect adjusts stab trim when flaps -->
     <!-- out in order to prevent running out of pitch authority  -->
     <!-- temporarily removed, under development
     <COMPONENT NAME="Flap Slab Interconnect" TYPE="PURE_GAIN">
       INPUT        fcs/flap-pos-deg
       GAIN         -0.15
     </COMPONENT>
     -->
     <!-- The pitch damper is here to make up for a lack of force feedback. -->
     <!-- If you have a FF joystick, try commenting this component out.     -->
     <!-- temporarily removed, under development
     <COMPONENT NAME="Pitch Damper" TYPE="PURE_GAIN">
       INPUT         aero/alphadot-rad_sec
       GAIN          -1.00
     </COMPONENT>
     -->
     <COMPONENT NAME="Pitch Trim Sum" TYPE="SUMMER">
       INPUT        fcs/elevator-cmd-norm
       INPUT        fcs/pitch-trim-cmd-norm
     <!--   INPUT        fcs/pitch-damper  -->
       CLIPTO       -1 1
     </COMPONENT>
     <COMPONENT NAME="Elevator Control" TYPE="AEROSURFACE_SCALE">
       INPUT         fcs/pitch-trim-sum
       MIN          -30
       MAX           30
       OUTPUT        fcs/elevator-pos-rad
       GAIN          0.01
     </COMPONENT>
     <COMPONENT NAME="Roll Trim Sum" TYPE="SUMMER">
       INPUT         fcs/aileron-cmd-norm
       INPUT         fcs/roll-trim-cmd-norm
       CLIPTO        -1 1
     </COMPONENT>
     <COMPONENT NAME="Left Aileron Control" TYPE="AEROSURFACE_SCALE">
       INPUT         fcs/roll-trim-sum
       MIN          -20
       MAX           15
       GAIN          0.01
       OUTPUT        fcs/left-aileron-pos-rad
     </COMPONENT>
      <COMPONENT NAME="Right Aileron Control" TYPE="AEROSURFACE_SCALE">
       INPUT         fcs/roll-trim-sum
       MIN          -20
       MAX           15
       INVERT
       GAIN          0.01
       OUTPUT        fcs/right-aileron-pos-rad
     </COMPONENT>
     <COMPONENT NAME="Yaw Trim Sum" TYPE="SUMMER">
       INPUT        fcs/rudder-cmd-norm
       INPUT        fcs/yaw-trim-cmd-norm
       CLIPTO       -1 1
     </COMPONENT>
     <COMPONENT NAME="Yaw Damper Rate" TYPE="PURE_GAIN">
       INPUT        velocities/r-rad_sec
       GAIN         2.00
     </COMPONENT>
     <COMPONENT NAME="Yaw Damper Beta" TYPE="PURE_GAIN">
       INPUT        aero/beta-rad
       GAIN         -7.00
     </COMPONENT>
     <COMPONENT NAME="Rudder Sum" TYPE="SUMMER">
       INPUT        fcs/yaw-trim-sum
       INPUT        fcs/yaw-damper-rate
       INPUT        fcs/yaw-damper-beta
       CLIPTO       -1 1
     </COMPONENT>
     <COMPONENT NAME="Rudder Control" TYPE="AEROSURFACE_SCALE">
       INPUT         fcs/rudder-sum
       MIN           -25
       MAX           25
       GAIN          0.01745
       OUTPUT        fcs/rudder-pos-rad
     </COMPONENT>
     <COMPONENT NAME="Flaps Control" TYPE="KINEMAT">
       INPUT        fcs/flap-cmd-norm
       DETENTS      3
                    0      0
                    15     4
                    30     3
       OUTPUT       fcs/flap-pos-deg
     </COMPONENT>
     <COMPONENT NAME="Gear Control" TYPE="KINEMAT">
       INPUT        gear/gear-cmd-norm
       DETENTS      2
                    0    0
                    1    5
       OUTPUT       gear/gear-pos-norm
     </COMPONENT>
     <COMPONENT NAME="Speedbrake" TYPE="KINEMAT">
       INPUT        fcs/speedbrake-cmd-norm
       DETENTS      2
                    0    0
                    1    1
       OUTPUT       fcs/speedbrake-pos-norm
     </COMPONENT>
  </FLIGHT_CONTROL>

  <AERODYNAMICS>
    AC_ALPHALIMITS -0.30 0.60
    AC_HYSTLIMITS  -0.20 0.56
  <AXIS NAME="LIFT">
    <COEFFICIENT NAME="CLalpha" TYPE="TABLE">
      Lift_due_to_alpha
      23
      2
      aero/alpha-rad
      fcs/flap-pos-deg
      aero/qbar-psf|metrics/Sw-sqft
             0      30
      -0.21 -1.23  -0.83
       0.00  0.00   0.45
       0.09  0.64   0.93
       0.10  0.75   1.03
       0.12  0.85   1.12
       0.14  0.96   1.22
       0.16  1.03   1.28
       0.17  1.09   1.33
       0.19  1.16   1.39
       0.21  1.23   1.45
       0.24  1.34   1.58
       0.26  1.44   1.72
       0.28  1.47   1.88
       0.30  1.50   2.00
       0.32  1.52   1.80
       0.34  1.56   1.60
       0.36  1.47   1.30
       0.38  1.38   1.20
       0.40  1.32   1.12
       0.50  1.21   0.90
       0.60  1.08   0.65
       0.70  0.96   0.40
       0.80  0.83   0.20
     </COEFFICIENT>
     <COEFFICIENT NAME="CLDe" TYPE="VALUE">
         Lift_due_to_Elevator_Deflection
         aero/qbar-psf|metrics/Sw-sqft|fcs/elevator-pos-rad
         0.193
     </COEFFICIENT>
    </AXIS>
    <AXIS NAME="DRAG">
         <COEFFICIENT NAME="CDo" TYPE="VECTOR">
           Drag_at_zero_lift
           4
           velocities/mach-norm
           aero/qbar-psf|metrics/Sw-sqft
           0.0   0.012
           0.8   0.012
           1.1   0.031
           2.0   0.020
         </COEFFICIENT>
         <COEFFICIENT NAME="CDalpha" TYPE="TABLE">
           Drag_due_to_alpha
           27
           2
           aero/alpha-rad
           fcs/flap-pos-deg
           aero/qbar-psf|metrics/Sw-sqft
                      0              30
          -0.0872664  0.0700000      0.0525000
          -0.0698132  0.0350000      0.0361851
          -0.0523599  0.0430000      0.0318000
          -0.0349066  0.0250000      0.0210800
          -0.0174533  0.0150000      0.0318346
           0          0.0000000      0.0598350
           0.0174533  0.0146492      0.0753315
           0.0349066  0.0257119      0.0931200
           0.0523599  0.0483047      0.1132050
           0.0698132  0.0724278      0.1355853
           0.0872664  0.088081       0.1602606
           0.10472    0.105265       0.187232
           0.122173   0.123978       0.216498
           0.139626   0.144222       0.248060
           0.15708    0.157346       0.268476
           0.174533   0.170848       0.289449
           0.191986   0.184905       0.311253
           0.209439   0.199517       0.333756
           0.226893   0.215072       0.357963
           0.244346   0.23231        0.384640
           0.261799   0.252059       0.415100
           0.279253   0.258667       0.425250
           0.296706   0.25869        0.412987
           0.314159   0.259          0.394689
           0.331613   0.263          0.355129
           0.349066   0.270          0.30
           0.6        0.30           0.20
         </COEFFICIENT>
      <COEFFICIENT NAME="CDde" TYPE="VALUE">
        Drag_due_to_elevator_Deflection
        aero/qbar-psf|metrics/Sw-sqft|fcs/mag-elevator-pos-rad
        0.04
      </COEFFICIENT>
      <COEFFICIENT NAME="CDbeta" TYPE="VALUE">
        Drag_due_to_sideslip
        aero/qbar-psf|metrics/Sw-sqft|aero/mag-beta-rad
        0.20
      </COEFFICIENT>
      <COEFFICIENT NAME="CDgear" TYPE="VALUE">
        Drag_due_to_landing_gear
        aero/qbar-psf|metrics/Sw-sqft|gear/gear-pos-norm
        0.03
      </COEFFICIENT>
      <COEFFICIENT NAME="CDspeedbrake" TYPE="VALUE">
        Drag_due_to_speedbrake
        aero/qbar-psf|metrics/Sw-sqft|fcs/speedbrake-pos-norm
        0.03
      </COEFFICIENT>
    </AXIS>
    <AXIS NAME="SIDE">
      <COEFFICIENT NAME="CYb" TYPE="VECTOR">
        Side_force_due_to_beta
        3
        aero/beta-rad
        aero/qbar-psf|metrics/Sw-sqft
        -0.35   0.5
         0      0
         0.35  -0.5
      </COEFFICIENT>
    </AXIS>
    <AXIS NAME="ROLL">
      <COEFFICIENT NAME="Clb" TYPE="TABLE">
        Roll_moment_due_to_beta
        3
        4
        aero/beta-rad
        aero/alpha-rad
        aero/qbar-psf|metrics/Sw-sqft|metrics/bw-ft
                  0     0.16   0.17   0.60
        -0.35     0.01  0.04   0.10   0.30
         0        0.00  0.00   0.00   0.00
         0.35    -0.01 -0.04  -0.10  -0.30
      </COEFFICIENT>
      <COEFFICIENT NAME="Clp" TYPE="VALUE">
        Roll_moment_due_to_roll_rate_(roll_damping)
        aero/qbar-psf|metrics/Sw-sqft|metrics/bw-ft|aero/bi2vel|velocities/p-aero-rad_sec
        -0.5
      </COEFFICIENT>
      <COEFFICIENT NAME="Clr" TYPE="VALUE">
        Roll_moment_due_to_yaw_rate
        aero/qbar-psf|metrics/Sw-sqft|metrics/bw-ft|aero/bi2vel|velocities/r-aero-rad_sec
        0.005
      </COEFFICIENT>
      <COEFFICIENT NAME="Clda" TYPE="VALUE">
        Roll_moment_due_to_aileron
        aero/qbar-psf|metrics/Sw-sqft|metrics/bw-ft|fcs/left-aileron-pos-rad
        0.26
      </COEFFICIENT>
      <COEFFICIENT NAME="Cldr" TYPE="VALUE">
        Roll_moment_due_to_rudder
        aero/qbar-psf|metrics/Sw-sqft|metrics/bw-ft|fcs/rudder-pos-rad
        0.005
      </COEFFICIENT>
    </AXIS>
    <AXIS NAME="PITCH">
      <COEFFICIENT NAME="Cmo" TYPE="VECTOR">
        Pitching_moment_at_zero_alpha
        2
        fcs/flap-pos-deg
        aero/qbar-psf|metrics/Sw-sqft|metrics/cbarw-ft
        0   0.04
        30  0.00
      </COEFFICIENT>
      <COEFFICIENT NAME="Cmalpha" TYPE="VALUE">
        Pitch_moment_due_to_alpha
        aero/qbar-psf|metrics/Sw-sqft|metrics/cbarw-ft|aero/alpha-rad
        -1.00
      </COEFFICIENT>
      <COEFFICIENT NAME="CmDe" TYPE="VALUE">
        Pitch_moment_due_to_elevator_Deflection
        aero/qbar-psf|metrics/Sw-sqft|metrics/cbarw-ft|fcs/elevator-pos-rad
        -1.00
      </COEFFICIENT>
      <COEFFICIENT NAME="Cmq" TYPE="VALUE">
        Pitch_moment_due_to_pitch_rate
        aero/qbar-psf|metrics/Sw-sqft|metrics/cbarw-ft|aero/ci2vel|velocities/q-aero-rad_sec
        -14.0
      </COEFFICIENT>
      <COEFFICIENT NAME="Cmadot" TYPE="VALUE">
        Pitch_moment_due_to_alpha_rate
        aero/qbar-psf|metrics/Sw-sqft|metrics/cbarw-ft|aero/ci2vel|aero/alphadot-rad_sec
        -14.0
      </COEFFICIENT>
    </AXIS>
    <AXIS NAME="YAW">
      <COEFFICIENT NAME="Cnr" TYPE="VALUE">
        Yaw_moment_due_to_yaw_rate
        aero/qbar-psf|metrics/Sw-sqft|metrics/bw-ft|aero/bi2vel|velocities/r-aero-rad_sec
        -0.05
      </COEFFICIENT>
      <COEFFICIENT NAME="Cnb" TYPE="VALUE">
        Yaw_moment_due_to_beta
        aero/qbar-psf|metrics/Sw-sqft|metrics/bw-ft|aero/beta-rad
        0.04
      </COEFFICIENT>
      <COEFFICIENT NAME="Cndr" TYPE="VALUE">
        Yaw_moment_due_to_rudder
        aero/qbar-psf|metrics/Sw-sqft|metrics/bw-ft|fcs/rudder-pos-rad
        -0.05
      </COEFFICIENT>
    </AXIS>

  </AERODYNAMICS>

</FDM_CONFIG>
