<FDM_CONFIG NAME="MK-82" VERSION="1.60">

  <!--

  File:        mk82.xml
  Author:      Cameron Munro
  CVS Version: $Id: mk82.xml,v 1.5 2004/02/14 09:25:39 ehofman Exp $

  Function: Models a 500 lb. Mk-82 bomb
  Notes:    Try running JSBSim using this command line,
            ./jsbsim mk82 reset00
  -->

  <METRICS>

    <!--
    Center of gravity location, empty weight, in aircraft structural coord
    system. X, Y, Z, in inches; X is positive out the tail, Y positive out the
    right wing.

    Pilot eyepoint location, in aircraft coord system, FROM cg.
    X, Y, Z, in inches
    -->

    AC_WINGAREA 2.54
    AC_WINGSPAN 0.9
    AC_CHORD    0.9
    AC_IXX      0.66
    AC_IYY      633.0
    AC_IZZ      633.0
    AC_IXZ      0
    AC_EMPTYWT  500
    AC_CGLOC    31.0 0.0 0.0
    AC_EYEPTLOC  0.0  0.0 0.0
    AC_AERORP   33.08 0.0 0.0
    AC_VRP      31.0 0.0 0.0

  </METRICS>

  <UNDERCARRIAGE>

    <!--
    the gear parameters that can be specified are as follows, IN ORDER OF APPEARANCE:

    AC_GEAR
    <name>                           name of gear entry - no spaces allowed
    <X> <Y> <Z>                      Gear location in aircraft body coords in inches
    <spring constant>                spring constant in lbs/ft
    <damping coefficient>            damping coefficient in lbs/ft/sec
    <dynamic friction coefficient>   Self-explanatory: sliding friction coefficient
    <static friction coefficient>    Self-explanatory: "onset" friction coefficient
    <rolling resistance coefficient> Self-explanatory: rolling resistance coefficient
    <steerability attribute>         One of <STEERABLE | FIXED | CASTERED>
    <brake group membership>         One of <LEFT | CENTER | RIGHT | NOSE | TAIL | NONE>
    <max steer angle>                Maximum steerable angle in degrees
    <retractable>                    FIXED or RETRACTABLE
    -->

   AC_GEAR  NOSE_CONTACT    0.0  0.0  0.0  10000 200000  0.0  0.0  0.0  FIXED NONE 0 FIXED
   AC_GEAR  TAIL_CONTACT   66.0  0.0  0.0  10000 200000  0.0  0.0  0.0  FIXED NONE 0 FIXED

  </UNDERCARRIAGE>

  <PROPULSION>
    <!--
      No propulsion
    -->
  </PROPULSION>

  <FLIGHT_CONTROL NAME="MK-82 FCS">
    <!--
      No FCS
    -->
  </FLIGHT_CONTROL>


  <AERODYNAMICS>

    <!--
      Data as computed from Missile DATCOM by Cameron Munro
    -->

    <AXIS NAME="LIFT">

      <COEFFICIENT NAME="CLwbh" TYPE="TABLE">
        Lift_due_to_alpha
        10
        13
        aero/alpha-rad velocities/mach-norm
        aero/qbar-psf | metrics/Sw-sqft | aero/alpha-rad
                0.2     0.4     0.8     0.9     0.95    0.98    1       1.02    1.05    1.1     1.2     1.4     1.6
        0.000   0       0       0       0       0       0       0       0       0       0       0       0       0
        0.175   0.892   0.853   0.605   0.596   0.583   0.577   0.578   0.572   0.564   0.551   0.629   0       0
        0.349   1.891   1.598   1.239   1.246   1.224   1.222   1.231   1.224   1.23    1.234   1.75    0.918   0.653
        0.524   2.68    2.389   2.131   2.715   2.82    2.967   3.095   3.167   3.245   3.306   3.586   2.371   1.953
        0.698   2.713   2.671   3.865   3.966   4.088   4.274   4.432   4.546   4.658   4.719   4.95    4.082   3.381
        0.873   2.22    2.425   4.113   4.132   4.258   4.495   4.688   4.834   4.976   5.002   5.106   5.058   4.159
        1.047   1.777   1.999   3.742   3.769   3.87    4.062   4.218   4.326   4.428   4.476   4.589   5.269   4.465
        1.222   1.23    1.5     2.849   2.819   2.874   3.028   3.154   3.243   3.329   3.384   3.465   4.708   4.121
        1.396   0.612   0.794   1.535   1.494   1.531   1.617   1.685   1.732   1.787   1.823   1.85    3.521   3.17
        1.553   0.047   0.067   0.145   0.14    0.144   0.152   0.159   0.16    0.165   0.169   0.172   1.877   1.732
      </COEFFICIENT>

    </AXIS>

    <AXIS NAME="DRAG">

      <COEFFICIENT NAME="CDmin" TYPE="VECTOR">
        Drag_minimum
        13
        velocities/mach-norm
        aero/qbar-psf | metrics/Sw-sqft
        0.2     0.14
        0.4     0.139
        0.8     0.144
        0.9     0.149
        0.95    0.211
        0.98    0.252
        1.0     0.281
        1.02    0.305
        1.05    0.327
        1.1     0.359
        1.2     0.373
        1.4     0.418
        1.6     0.275
      </COEFFICIENT>

      <COEFFICIENT NAME="CDi" TYPE="TABLE">
        Drag_induced
        10
        13
        aero/alpha-rad velocities/mach-norm
        aero/qbar-psf | metrics/Sw-sqft | aero/cl-squared-norm
                0.2     0.4     0.8     0.9     0.95    0.98    1       1.02    1.05    1.1     1.2     1.4     1.6
        0       0       0       0       0       0       0       0       0       0       0       0       0       0
        0.175   0.156   0.15    0.107   0.105   0.103   0.102   0.102   0.101   0.099   0.098   0.111   0.16    0.119
        0.349   0.673   0.573   0.45    0.451   0.444   0.443   0.445   0.443   0.445   0.447   0.623   0.856   0.729
        0.524   1.476   1.332   1.199   1.487   1.537   1.61    1.674   1.709   1.746   1.774   1.914   2.343   1.996
        0.698   2.121   2.097   2.857   2.914   2.988   3.106   3.208   3.278   3.346   3.377   3.529   4.226   3.576
        0.873   2.502   2.755   4.563   4.561   4.678   4.921   5.121   5.274   5.418   5.427   5.512   6.208   5.36
        1.047   2.949   3.34    6.2     6.225   6.362   6.655   6.895   7.066   7.218   7.277   7.439   8.025   7.124
        1.222   3.272   4.02    7.613   7.517   7.62    8.005   8.323   8.559   8.772   8.895   9.089   9.486   8.647
        1.396   3.414   4.449   8.589   8.345   8.506   8.953   9.314   9.59    9.881   10.051  10.182  10.433  9.74
        1.553   3.383   4.525   8.957   8.662   8.852   9.321   9.699   10.012  10.321  10.504  10.593  10.702  10.165
      </COEFFICIENT>

    </AXIS>

    <AXIS NAME="SIDE">

      <COEFFICIENT NAME="CYb" TYPE="TABLE">
        Side_force_due_to_beta
        10
        13
        aero/alpha-rad velocities/mach-norm
        aero/qbar-psf | metrics/Sw-sqft | aero/beta-rad
                0.2     0.4     0.8     0.9     0.95    0.98    1       1.02    1.05    1.1     1.2     1.4     1.6
        0.000  -4.572  -4.778  -2.839  -2.783  -2.782  -2.782  -2.802  -2.788  -2.726  -2.624  -2.127  -3.751  -1.868
        0.175  -3.465  -3.462  -2.539  -2.570  -2.592  -2.622  -2.662  -2.674  -2.687  -2.699  -3.240  -5.087  -3.530
        0.349  -4.033  -3.176  -2.306  -2.437  -2.489  -2.557  -2.621  -2.649  -2.727  -2.833  -4.410  -6.460  -5.260
        0.524  -3.788  -3.232  -2.947  -4.193  -4.510  -4.866  -5.152  -5.340  -5.551  -5.763  -6.401  -7.782  -6.478
        0.698  -3.138  -3.086  -4.940  -5.169  -5.431  -5.750  -6.008  -6.204  -6.404  -6.557  -6.963  -7.809  -6.508
        0.873  -2.975  -3.200  -5.258  -5.300  -5.500  -5.819  -6.077  -6.274  -6.464  -6.515  -6.664  -7.291  -6.247
        1.047  -2.791  -3.019  -4.947  -4.988  -5.125  -5.353  -5.542  -5.670  -5.786  -5.844  -6.005  -6.424  -5.628
        1.222  -2.586  -2.868  -4.303  -4.285  -4.354  -4.525  -4.673  -4.770  -4.857  -4.910  -5.055  -5.313  -4.705
        1.396  -2.388  -2.585  -3.412  -3.389  -3.436  -3.532  -3.620  -3.669  -3.720  -3.747  -3.864  -4.061  -3.578
        1.553  -2.237  -2.284  -2.493  -2.516  -2.530  -2.551  -2.583  -2.584  -2.584  -2.579  -2.703  -2.902  -2.470
      </COEFFICIENT>

    </AXIS>

    <AXIS NAME="ROLL">
      <COEFFICIENT NAME="Clbeta" TYPE="TABLE">
        Roll_moment_due_to_beta
        10
        13
        aero/alpha-rad velocities/mach-norm
        aero/qbar-psf | metrics/Sw-sqft | metrics/bw-ft | aero/beta-rad
                0.2     0.4     0.8     0.9     0.95    0.98    1       1.02    1.05    1.1     1.2     1.4     1.6
        0.000   0.000   0.000   0.000   0.000   0.000   0.000   0.000   0.000   0.000   0.000   0.000   0.000   0.000
        0.175   0.150   0.089   0.005   0.011   0.014   0.016   0.017   0.017   0.018   0.019   0.021   0.037   0.040
        0.349   -0.055  -0.055  -0.037  -0.029  -0.027  -0.024  -0.022  -0.020  -0.016  -0.010  0.002   0.035   0.042
        0.524   -0.028  -0.020  0.011   0.016   0.018   0.019   0.020   0.021   0.022   0.018   0.026   0.050   0.074
        0.698   0.296   0.276   0.230   0.221   0.213   0.209   0.208   0.204   0.198   0.188   0.179   0.156   0.166
        0.873   0.300   0.292   0.275   0.273   0.270   0.269   0.270   0.268   0.266   0.261   0.266   0.269   0.257
        1.047   0.296   0.298   0.307   0.311   0.310   0.311   0.313   0.312   0.311   0.308   0.321   0.339   0.323
        1.222   0.310   0.312   0.324   0.329   0.329   0.330   0.333   0.332   0.330   0.328   0.343   0.365   0.352
        1.396   0.316   0.317   0.330   0.336   0.337   0.338   0.341   0.340   0.339   0.338   0.354   0.378   0.366
        1.553   0.312   0.313   0.327   0.332   0.333   0.334   0.338   0.337   0.336   0.334   0.350   0.374   0.363
      </COEFFICIENT>

    </AXIS>

    <AXIS NAME="PITCH">

      <COEFFICIENT NAME="Cmalpha" TYPE="TABLE">
        Pitch_moment_due_to_alpha
        10
        13
        aero/alpha-rad velocities/mach-norm
        aero/qbar-psf | metrics/Sw-sqft | metrics/cbarw-ft | aero/alpha-rad
                 0.2     0.4     0.8     0.9     0.95    0.98    1       1.02    1.05    1.1     1.2     1.4     1.6
        0.000   -1.372  -1.783  -1.325  -0.261  -0.267  -0.053  -0.228  -0.111  0.398   -0.001  -1.693  -3.622   9.024
        0.175   -3.699  -3.767  -2.384  -1.263  -1.168  -0.921  -1.039  -0.873  -0.330  -0.507  -1.538  -2.550   8.734
        0.349   -6.284  -6.212  -4.594  -3.443  -3.258  -2.988  -3.042  -2.872  -2.376  -2.401  -3.163  -3.719   5.667
        0.524   -6.683  -6.645  -5.490  -4.885  -4.762  -4.588  -4.630  -4.547  -4.266  -4.303  -5.053  -5.767   0.458
        0.698   -1.322  -1.746  -2.730  -3.121  -3.282  -3.345  -3.436  -3.503  -3.563  -3.790  -4.588  -6.019  -3.949
        0.873    0.427  -0.095  -2.134  -2.900  -3.137  -3.320  -3.391  -3.537  -3.817  -3.987  -4.419  -5.621  -7.850
        1.047   -3.016  -3.029  -4.167  -4.973  -5.095  -5.269  -5.263  -5.404  -5.745  -5.655  -5.411  -5.544  -11.380
        1.222   -4.218  -4.106  -5.292  -6.268  -6.356  -6.549  -6.510  -6.664  -7.063  -6.885  -6.396  -6.149  -14.120
        1.396   -4.548  -4.488  -5.795  -6.809  -6.878  -7.091  -7.053  -7.218  -7.650  -7.455  -6.902  -6.550  -15.150
        1.553   -4.548  -4.546  -5.885  -6.854  -6.929  -7.150  -7.117  -7.276  -7.725  -7.539  -6.970  -6.606  -15.160
      </COEFFICIENT>

      <COEFFICIENT NAME="Cmq" TYPE="VALUE">
         Pitch_moment_due_to_pitch_rate
         aero/qbar-psf | metrics/Sw-sqft | metrics/cbarw-ft | aero/ci2vel | velocities/q-aero-rad_sec
         -50
      </COEFFICIENT>

      <COEFFICIENT NAME="Cmadot" TYPE="VALUE">
        Pitch_moment_due_to_alpha_rate
        aero/qbar-psf | metrics/Sw-sqft | metrics/cbarw-ft | aero/ci2vel | aero/alphadot-rad_sec
        -3.46
      </COEFFICIENT>

    </AXIS>

    <AXIS NAME="YAW">

      <COEFFICIENT NAME="Cnbeta" TYPE="TABLE">
        Yaw_moment_due_to_beta
        10
        13
        aero/alpha-rad velocities/mach-norm
        aero/qbar-psf | metrics/Sw-sqft | metrics/cbarw-ft | aero/beta-rad
                0.2    0.4    0.8    0.9    0.95   0.98   1      1.02    1.05  1.1    1.2    1.4     1.6
        0.000   1.372  1.783  1.325  0.261  0.267  0.053  0.228  0.111 -0.398  0.001  1.693  3.622  -9.024
        0.175   3.699  3.767  2.384  1.263  1.168  0.921  1.039  0.873  0.330  0.507  1.538  2.550  -8.734
        0.349   6.284  6.212  4.594  3.443  3.258  2.988  3.042  2.872  2.376  2.401  3.163  3.719  -5.667
        0.524   6.683  6.645  5.490  4.885  4.762  4.588  4.630  4.547  4.266  4.303  5.053  5.767  -0.458
        0.698   1.322  1.746  2.730  3.121  3.282  3.345  3.436  3.503  3.563  3.790  4.588  6.019   3.949
        0.873  -0.427  0.095  2.134  2.900  3.137  3.320  3.391  3.537  3.817  3.987  4.419  5.621   7.850
        1.047   3.016  3.029  4.167  4.973  5.095  5.269  5.263  5.404  5.745  5.655  5.411  5.544   11.380
        1.222   4.218  4.106  5.292  6.268  6.356  6.549  6.510  6.664  7.063  6.885  6.396  6.149   14.120
        1.396   4.548  4.488  5.795  6.809  6.878  7.091  7.053  7.218  7.650  7.455  6.902  6.550   15.150
        1.553   4.548  4.546  5.885  6.854  6.929  7.150  7.117  7.276  7.725  7.539  6.970  6.606   15.160
      </COEFFICIENT>

       <COEFFICIENT NAME="Cnr" TYPE="VALUE">
         Yaw_moment_due_to_yaw_rate
         aero/qbar-psf | metrics/Sw-sqft | metrics/bw-ft | aero/bi2vel | velocities/r-aero-rad_sec
         -60
       </COEFFICIENT>

    </AXIS>

  </AERODYNAMICS>

  <OUTPUT NAME="JSBout.csv" TYPE="CSV">
    RATE_IN_HZ       20
    SIMULATION       ON
    ATMOSPHERE       OFF
    MASSPROPS        OFF
    AEROSURFACES     ON
    RATES            ON
    VELOCITIES       ON
    FORCES           ON
    MOMENTS          ON
    POSITION         ON
    COEFFICIENTS     OFF
    GROUND_REACTIONS ON
    FCS              ON
    PROPULSION       ON
  </OUTPUT>

</FDM_CONFIG>
