<?xml version="1.0"?>
<!-- Generated by Aero-Matic v 0.8

     Inputs:
                horsepower: 100
                     pitch: fixed
            max engine rpm: 1200
        prop diameter (ft): 8.5

     Outputs:
              max prop rpm:2207.41
                gear ratio:   0.54
                       Cp0:0.010468
                       Ct0:0.009002
       static thrust (lbs): 151.26
-->

<propeller name="prop">
  <ixx> 14.7913 </ixx>         <!-- aeromatic: 4.7681, selig engine: 10.0232 -->
  <diameter unit="IN">102.0 </diameter>
  <numblades> 2 </numblades>
  <gearratio>1.0 </gearratio>

  <table name="C_THRUST" type="internal">
     <tableData>
       0.0  0.0090
       0.1  0.0086
       0.2  0.0083
       0.3  0.0076
       0.4  0.0068
       0.5  0.0060
       0.6  0.0049
       0.7  0.0037
       0.8  0.0020
       1.0  -0.0007
       1.2  -0.0035
       1.4  -0.0064
     </tableData>
  </table>


  <table name="C_POWER" type="internal">
     <tableData>
       0.0  0.0105
       0.1  0.0105
       0.2  0.0102
       0.3  0.0100
       0.4  0.0094
       0.5  0.0086
       0.6  0.0079
       0.7  0.0066
       0.8  0.0054
       1.0  0.0019
       1.2  -0.0031
       1.4  -0.0093
       1.6  -0.0158
     </tableData>
  </table>

</propeller>
