<?xml version="1.0"?>
<!--
  File:     Oberursel Ur.II.xml
  Author:   Aero-Matic v 0.8

  Inputs:
    name:           Oberursel Ur.II
    type:           piston
    power:          100 hp
    augmented?      no
    injected?       no
-->

<piston_engine name="Oberursel Ur.II">
  <minmp unit="INHG">          6.0 </minmp>	<!-- Deprecated -->
  <maxmp unit="INHG">         30.0 </maxmp>	<!-- Deprecated -->
  <displacement unit="IN3"> 160.00 </displacement>
  <maxhp>        100.00 </maxhp>		<!-- Deprecated -->
  <bsfc>           0.45 </bsfc>
  <cycles>         2.0 </cycles>
  <idlerpm>      700.0 </idlerpm>
  <maxrpm>      1200.0 </maxrpm>
  <maxthrottle>    1.0 </maxthrottle>
  <minthrottle>    0.2 </minthrottle>
  <sparkfaildrop>  0.0 </sparkfaildrop>
</piston_engine>
