<?xml version="1.0"?>

<propeller name="Fixed-Pitch 75-inch Two-Blade Propeller">
  <ixx> 1.67 </ixx>
  <diameter unit="IN"> 75.0 </diameter>
  <numblades> 2 </numblades>
  <minpitch> 22 </minpitch>
  <maxpitch> 22 </maxpitch>

  <function name="C_THRUST">
    <table>
      <independentVar lookup="row">propulsion/advance-ratio</independentVar>
      <tableData>
        0.0   0.068
        0.1   0.068
        0.2   0.067
        0.3   0.066
        0.4   0.064
        0.5   0.061
        0.6   0.057
        0.7   0.050
        0.8   0.040
        0.9   0.029
        1.0   0.019
        1.1   0.008
        1.2   -0.001
        1.3   -0.008
        1.4   -0.019
        1.5   -0.029
        1.6   -0.040
        1.7   -0.050
        1.8   -0.057
        1.9   -0.061
        2.0   -0.064
        2.1   -0.066
        2.2   -0.067
        2.3   -0.068
        5.0   -0.068
      </tableData>
    </table>
  </function>

  <function name="C_POWER">
    <table>
      <independentVar lookup="row">propulsion/advance-ratio</independentVar>
      <tableData>
        0.0   0.0580
        0.1   0.0620
        0.2   0.0600
        0.3   0.0580
        0.4   0.0520
        0.5   0.0450
        0.6   0.0421
        0.7   0.0389
        0.8   0.0346
        0.9   0.0280
        1.0   0.0202
        1.1   0.0111
        1.2   0.0075
        1.3   0.0111
        1.4   0.0202
        1.5   0.0280
        1.6   0.0346
        1.7   0.0389
        1.8   0.0421
        1.9   0.0436
        2.0   0.0445
        2.1   0.0445
        2.2   0.0442
        2.3   0.0431
        2.4   0.0424
        5.0   0.0413
      </tableData>
    </table>
  </function>

</propeller>
