<?xml version="1.0"?>
<!-- Generated by Aero-Matic v 0.8

     Inputs:
                horsepower: 920
                     pitch: 2 settings
            max engine rpm: 2475
        prop diameter (ft): 12.75

     Outputs:
              max prop rpm:1471.61
                gear ratio:   1.68
                       Cp0:0.042802
                       Ct0:0.036810
       static thrust (lbs):1391.55
-->
<propeller name="deHavilland5000">
  <documentation>
   Propeller data from [Cassidy:2004:FE]:
   - Two pitch settings: FINE and COARSE
   - in FINE pitch for take-off - 13 280 lb. thrust total at 20 knots
   - "The airscrews fitted initially to all the 'boats were de Havilland 5000
      series 2 position variable pitch units of 12 ft. 9 ins. diameter with a
      pitch of approximately 14 ft. ... each weighing 365 lb. ..."
  </documentation>

  <ixx>24.1386 </ixx>
  <diameter unit="IN">153.0 </diameter>
  <numblades> 3 </numblades>
  <gearratio>2.00 </gearratio>
  <minpitch> 18 </minpitch>
  <maxpitch> 27 </maxpitch>

  <table name="C_THRUST" type="internal">
      <tableData>
                12         30
       0.0      0.0368   0.0768
       0.1      0.0338   0.0768
       0.2      0.0307   0.0768
       0.3      0.0255   0.0764
       0.4      0.0194   0.0760
       0.5      0.0132   0.0750
       0.6      0.0057   0.0710
       0.7      -0.0005   0.0639
       0.8      -0.0109   0.0567
       1.0      -0.0236   0.0377
       1.2      -0.0387   0.0201
       1.4      -0.0529   0.0015
       1.6      -0.0692   -0.0165
       1.8      -0.0847   -0.0344
       2.0      -0.0994   -0.0532
       2.2      -0.1141   -0.0722
       2.4      -0.1288   -0.0914
      </tableData>
  </table>

  <table name="C_POWER" type="internal">
     <tableData>
                12         30
       0.0      0.0428   0.1028
       0.1      0.0428   0.1028
       0.2      0.0408   0.1028
       0.3      0.0388   0.1028
       0.4      0.0341   0.1028
       0.5      0.0281   0.1017
       0.6      0.0227   0.1005
       0.7      0.0134   0.0983
       0.8      0.0054   0.0937
       1.0      -0.0161   0.0765
       1.2      -0.0468   0.0514
       1.4      -0.0869   0.0257
       1.6      -0.1284   -0.0023
       1.8      -0.1712   -0.0627
       2.0      -0.2140   -0.1254
       2.2      -0.2568   -0.1881
       2.4      -0.2996   -0.2508
     </tableData>
  </table>

</propeller>
